OpenVSP model (file version 5), 5 components.
Geometry view with OpenVSP parameter names; values to 6 digits, angles in degrees, lengths in the model's unit.
Overall bounding box: X_Min=0 X_Len=14.9091 Y_Min=-4.44007 Y_Len=8.88013 Z_Min=-1.29319 Z_Len=2.54319

Fuselage "FuselageGeom"
  location (X Y Z) 0 0 0, rotation 0 0 0
  bounding box size 14.9091 3.50173 2.54319
  Design: Length=14.9091
  cross sections:
    n  XLocPercent  YLocPercent  ZLocPercent  shape
    0  0            0            -0.04        point
    1  0.251524     0            0            super ellipse Super_Height=2.5 Super_M=2 Super_MaxWidthLoc=-0.709091 Super_N=2 Super_Width=3.5
    2  0.5          0            0            as above
    3  0.99         0            0            as above
    4  1            0            0            point

Conformal "CabinConform", child of "FuselageGeom"
  location (X Y Z) 0 0 0, rotation 0 0 0
  bounding box size 2.96007 3.40171 2.05208
  Design: ChordTrimFlag=0 ChordTrimMax=0.9 ChordTrimMin=0.1 Offset=0.05 UTrimFlag=1 UTrimMax=0.3 UTrimMin=0.13 V1TrimBegin=0 V1TrimEnd=0.5 V1TrimFlag=1 V2TrimBegin=0.25 V2TrimEnd=0.75 V2TrimFlag=0

Custom "SeatGroup", child of "CabinConform"
  location (X Y Z) 1.90476 -0.55 -0.47619, rotation 0 0 0
  bounding box size 0.976849 1.6 1.30447
  Design: BackAngle=25 BackHeight=1 BackThick=0.1 SeatHeight=0.35 SeatLength=0.5 Width=0.5
  Layout: AisleWidth=1 NumLeft=2 NumMiddle=0 NumRight=0 NumRow=1 SeatGap=0.6 SeatPitch=1
  custom script SeatGroup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

Custom "PodMan", child of "SeatGroup"
  location (X Y Z) 2.85476 -0.55 0.72381, rotation -180 65 -180; relative location 0.95 0 1.2, rotation 0 115 0
  bounding box size 1.04607 0.673143 1.47857
  Design: ElbowAngle=65 Height=1.9 HipAngle=65 KneeAngle=-90 PresetTrigger=0 Presets=1 ShoulderAngle=0
  custom script PodMan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

Wing "WingGeom"
  location (X Y Z) 9 1.7 -0.7, rotation 25 0 0
  symmetric about XZ
  bounding box size 5.5 8.88013 1.56258
  totals: TotalSpan=6 TotalProjectedSpan=6 TotalChord=3.25 TotalArea=19.5 TotalAR=1.84615
  root: chord 5.5, twist 0, NACA 4-series Camber=0 CamberLoc=0.2 ThickChord=0.1
  sections:
    n  Span  Root_Chord  Tip_Chord  Area  Sweep  Sweep_Location  Dihedral  Twist  Twist_Location  tip airfoil
    1  3     5.5         1          9.75  55     0               0         0      0.25            as above
